*Heading
** Job name: Hole Model name: Hole
** Generated by: Abaqus/CAE 2020
*Preprint, echo=NO, model=NO, history=NO, contact=NO
**
** PARTS
**
*Part, name=Part-1
*Node
      1,           0.,   1.80057573,           0.
      2,           0.,   2.10635185,           0.
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*Element, type=C3D8R
    1,   254,   275,   274,   255,  1999,  2020,  2019,  2000
    2,   632,   687,   688,   621,  2377,  2432,  2433,  2366
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*Nset, nset=_PickedSet2, internal, generate
     1,  19195,      1
*Elset, elset=_PickedSet2, internal, generate
     1,  16670,      1
*Nset, nset="Edge Seeds-1"
     8,     9,    17,    25,    33,  1753
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*Elset, elset="Edge Seeds-1"
    38,    71,   270,   282,   317,  1705
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** Section: Section-2
*Solid Section, elset=_PickedSet2, material=Material-2
,
*End Part
**
**
** ASSEMBLY
**
*Assembly, name=Assembly
**
*Instance, name=Part-1-1, part=Part-1
*End Instance
**
*Nset, nset=_PickedSet13, internal, instance=Part-1-1
     9,    10,    11,    12,    13,    14
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*Elset, elset=_PickedSet13, internal, instance=Part-1-1
     9,    10,    11,    13,    38,    39
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*Nset, nset=_PickedSet14, internal, instance=Part-1-1
    25,    26,    27,    28,    29,    30
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*Elset, elset=_PickedSet14, internal, instance=Part-1-1
    89,   114,   125,   136,   270,   274
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*Nset, nset=_PickedSet15, internal, instance=Part-1-1
     1,     2,     3,     4,     5,     6
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*Elset, elset=_PickedSet15, internal, instance=Part-1-1
    37,    38,    48,    50,    59,   176
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*Nset, nset=_PickedSet16, internal, instance=Part-1-1, generate
    1,  1745,     1
*Elset, elset=_PickedSet16, internal, instance=Part-1-1, generate
    1,  1667,     1
*End Assembly
**
** MATERIALS
**
*Material, name=Material-1
*Elastic
1000., 0.3
*Material, name=Material-2
*Elastic
1000., 0.3
*Plastic
 50.,0.
550.,1.
** ----------------------------------------------------------------
**
** STEP: Step-1
**
*Step, name=Step-1, nlgeom=NO
*Static
1., 1., 1e-05, 1.
**
** BOUNDARY CONDITIONS
**
** Name: BC-1 Type: Displacement/Rotation
*Boundary
_PickedSet14, 2, 2
** Name: BC-2 Type: Displacement/Rotation
*Boundary
_PickedSet15, 1, 1
** Name: BC-3 Type: Displacement/Rotation
*Boundary
_PickedSet16, 3, 3
** Name: BC-4 Type: Displacement/Rotation
*Boundary
_PickedSet13, 2, 2, 0.4
**
** OUTPUT REQUESTS
**
*Restart, write, frequency=0
**
** FIELD OUTPUT: F-Output-1
**
*Output, field, variable=PRESELECT
**
** HISTORY OUTPUT: H-Output-1
**
*Output, history, variable=PRESELECT
*End Step
